<?xml version="1.0"?>
<!-- Generated by Aero-Matic v 1.1

     Inputs:
                horsepower: 360
                     pitch: variable
            max engine rpm: 2950
        prop diameter (ft): 7.0

     Outputs:
              max prop rpm: 2700
                gear ratio:    1.26
                       Cp0: 0.044
                       Ct0: 0.099808
       static thrust (lbs): 1475.27
-->

<propeller name="prop-MTV-23" version="1.1">
  <ixx unit="SLUG*FT2">  14.54 </ixx><!-- 5.54 neu: 15.54 -->
  <diameter unit="IN">  84 </diameter>
  <numblades> 3 </numblades>
  <gearratio>  1.10 </gearratio>
  <cp_factor> 1.05 </cp_factor>
  <ct_factor> 1.05 </ct_factor>
  <minpitch> 10 </minpitch>
  <maxpitch> 85 </maxpitch>
  <minrpm>   2278 </minrpm><!-- 2278 neu:1900 -->
  <maxrpm>   2700 </maxrpm>
  <constspeed> 1 </constspeed>

 <!-- thrust coefficient as a function of advance ratio and blade angle -->
  <table name="C_THRUST" type="internal">
      <tableData>
          -10        0         15        25        35        45        55        65       90
      -0.2      -0.0632    0.0356    0.1295    0.1586    0.1748    0.1845    0.1700    0.1457   0.0000
       0.0      -0.0939    0.0000    0.1295    0.1586    0.1748    0.1862    0.1740    0.1457   0.0000
       0.2      -0.1053   -0.0324    0.1117    0.1554    0.1723    0.1862    0.1740    0.1457   0.0000
       0.4      -0.1053   -0.0752    0.0842    0.1538    0.1691    0.1845    0.1740    0.1457   0.0000
       0.6      -0.1053   -0.1053    0.0445    0.1384    0.1618    0.1797    0.1715    0.1457   0.0000
       0.8      -0.1053   -0.1053    0.0025    0.1036    0.1570    0.1732    0.1715    0.1457   0.0000
       1.0      -0.1053   -0.1053   -0.0421    0.0632    0.1506    0.1643    0.1700    0.1457   0.0000
       1.2      -0.1053   -0.1053   -0.0866    0.0194    0.1238    0.1586    0.1700    0.1457   0.0000
       1.4      -0.1053   -0.1053   -0.1053   -0.0284    0.0891    0.1561    0.1668    0.1457   0.0000
       1.6      -0.1053   -0.1053   -0.1053   -0.0720    0.0486    0.1506    0.1635    0.1457   0.0000
       1.8      -0.1053   -0.1053   -0.1053   -0.1053    0.0082    0.1295    0.1586    0.1457   0.0000
       2.0      -0.1053   -0.1053   -0.1053   -0.1053   -0.0324    0.1011    0.1580    0.1457   0.0000
       2.2      -0.1053   -0.1053   -0.1053   -0.1053   -0.0729    0.0729    0.1554    0.1457   0.0000
       2.4      -0.1053   -0.1053   -0.1053   -0.1053   -0.1053    0.0388    0.1269    0.1457   0.0000
       2.6      -0.1053   -0.1053   -0.1053   -0.1053   -0.1053    0.0049    0.0803    0.1295   0.0000
       2.8      -0.1053   -0.1053   -0.1053   -0.1053   -0.1053   -0.0291    0.0526    0.1053   0.0000
       3.0      -0.1053   -0.1053   -0.1053   -0.1053   -0.1053   -0.0632    0.0276    0.0809   0.0000
       3.2      -0.1053   -0.1053   -0.1053   -0.1053   -0.1053   -0.0971    0.0025    0.0567   0.0000
       3.4      -0.1053   -0.1053   -0.1053   -0.1053   -0.1053   -0.1053   -0.0227    0.0324   0.0000
       3.6      -0.1053   -0.1053   -0.1053   -0.1053   -0.1053   -0.1053   -0.0478    0.0082   0.0000
       3.8      -0.1053   -0.1053   -0.1053   -0.1053   -0.1053   -0.1053   -0.0729   -0.0162   0.0000
       4.0      -0.1053   -0.1053   -0.1053   -0.1053   -0.1053   -0.1053   -0.0979   -0.0405   0.0000
       6.0      -0.1053   -0.1053   -0.1053   -0.1053   -0.1053   -0.1053   -0.1053   -0.1053   0.0000
      </tableData>
  </table>

   <!-- power coefficient as a function of advance ratio and blade angle -->
  <table name="C_POWER" type="internal">
     <tableData>
               -10        0        15        25        35        45        55        65       90
      -0.2      0.0093   0.0185    0.0648    0.1472    0.2539    0.3612    0.4167    0.4612   0.4612
       0.0      0.0371   0.0093    0.0556    0.1372    0.2428    0.3612    0.4184    0.4612   0.4612
       0.2      0.0528   0.0148    0.0537    0.1278    0.2323    0.3612    0.4184    0.4612   0.4612
       0.4      0.0711   0.0324    0.0463    0.1178    0.2206    0.3612    0.4184    0.4612   0.4612
       0.6      0.0872   0.0491    0.0306    0.1095    0.2067    0.3540    0.4167    0.4612   0.4612
       0.8      0.1028   0.0657    0.0093    0.0928    0.1945    0.3378    0.4167    0.4612   0.4612
       1.0      0.1184   0.0817    0.0093    0.0650    0.1834    0.3206    0.4151    0.4612   0.4612
       1.2      0.1345   0.0653   -0.0306    0.0250    0.1623    0.3073    0.4123    0.4612   0.4612
       1.4      0.1500   0.1128   -0.0461   -0.0185    0.1250    0.3028    0.4073    0.4612   0.4612
       1.6      0.1656   0.1289   -0.0539   -0.0556    0.0789    0.2945    0.3984    0.4445   0.4612
       1.8      0.1817   0.1445   -0.0556   -0.0928    0.0232    0.2612    0.3862    0.4351   0.4612
       2.0      0.1973   0.1600   -0.0711   -0.1295   -0.0278    0.2223    0.3678    0.4262   0.4612
       2.2      0.2128   0.1761   -0.0872   -0.1667   -0.0833    0.1806    0.3567    0.4073   0.4612
       2.4      0.2289   0.1917   -0.1028   -0.2039   -0.1389    0.1289    0.3462    0.3984   0.4612
       2.6      0.2445   0.2073   -0.1184   -0.2406   -0.1761    0.0539    0.3378    0.3845   0.4612
       2.8      0.2600   0.2234   -0.1345   -0.2778   -0.2111   -0.0183    0.3306    0.3795   0.4612
       3.0      0.2762   0.2389   -0.1500   -0.3151   -0.2500   -0.0833    0.3195    0.3795   0.4612
       3.2      0.2917   0.2545   -0.1656   -0.3517   -0.2873   -0.1484    0.2989    0.3706   0.4612
       3.4      0.3073   0.2706   -0.1817   -0.3890   -0.3239   -0.2128    0.2317    0.3612   0.4612
       3.6      0.3234   0.2862   -0.1973   -0.4262   -0.3612   -0.2778    0.1628    0.3517   0.4612
       3.8      0.3389   0.3017   -0.2128   -0.4612   -0.3984   -0.3428    0.0906    0.3406   0.4612
       4.0      0.3545   0.3178   -0.2289   -0.4612   -0.4612   -0.4073    0.0183    0.3151   0.4612
       6.0      0.4612   0.4612   -0.4612   -0.4612   -0.4612   -0.4612   -0.4612   -0.2778   0.4612
     </tableData>
  </table>


<!-- thrust effects of helical tip Mach -->
<table name="CT_MACH" type="internal">
  <tableData>
    0.85   1.0
    1.05   0.8
  </tableData>
</table>

<!-- power-required effects of helical tip Mach -->
<table name="CP_MACH" type="internal">
  <tableData>
    0.85   1.0
    1.05   1.8
    2.00   1.4
  </tableData>
</table>

</propeller>
